# set logfile
log		log.wall124-meta

# Box and units  (use LJ units and periodic boundaries)
units		real
# so:
#    mass = grams/mole		# same in gromacs
#    distance = Angstroms	# nm in gromacs
#    time = femtoseconds	# ps in gromacs
#    energy = Kcal/mole		# kcal/mol in gromacs
#    velocity = Angstroms/femtosecond	# ...
#    force = Kcal/mole-Angstrom	# ...
#    temperature = Kelvin	# same in gromacs
#    pressure = atmospheres	# same in gromacs
#    dynamic viscosity = Poise	# no idea
dimension	3
atom_style	molecular
boundary	p p f # boundary fixed along z

# Pair interactions require lists of neighbours to be calculated
neighbor	5.0 nsq
neigh_modify	every 1 delay 10 check yes

# define interactions
pair_style	lj12106/cut  30.0 # same as in md_sample.mdp from the smog-model web-tool
pair_modify	shift yes
bond_style	harmonic
angle_style	harmonic
dihedral_style	charmm
special_bonds	lj 0.0 0.0 0.0 angle yes dihedral yes # 3 exclusions

# READ "start" data file
read_data	data.input_wall

# define coeffs
include         settings.param
include		settings.pair_pwall

# groups
group		protein id <= 208
group		pwall   id 209 # wall particle

# Dump configs - "simple dumpings"
dump		1 all xtc 500 wall124-meta.xtc

# Sample thermodynamic info  (temperature, energy, pressure, etc.) #####
thermo		500
thermo_style	custom step temp pe epair ebond eangle edihed

# set timestep from
# tau=sqrt(m/eres)r0 = 0.00038 ns = 380 fs
# dt = 0.0075 tau = 2.85 fs
# may be better to just work in lj units then?
# where
# eres = 1.0 kJ/mol = 1000 J/mol # energy scale
# m    = 1 g/mol = 0.001 kg/mol # avg residue mass
# r0   = 3.8 A = 3.8 * 10e-10 m # avg distance between neighbouring residues
# 1/friction = 1000 fs
fix		nve all nve   ###NVE ensemble
fix		lan all langevin 124 124 1000.0 12308   # Langevin integrator Tstart Tstop 1/friction rndseed
include		wall_cyc_lmp_input_0.244.dat
fix		lowall protein wall/lj93 zlo -50.0 0.239 8.0 6.86699 units box
fix		com protein recenter 0.0 0.0 NULL units box
set		group pwall x 0.0 y 0.0 z 60.0
timestep        0.5
reset_timestep  0

fix             plumed all plumed plumedfile plumed_124-meta.dat outfile plumed_124-meta.log
fix		pwallfreeze pwall setforce 0.0 0.0 0.0 # freeze the particle after plumed, otherwise it will move
run		1000000000
